// SBML level 3 version 1

function BB_218(A1, A2, A3, A4)
  A2 - A1 + A3*A2 + A4*A1;
end

function GK_219(A1, A2, A3, A4)
  2*A4*A1/(A2 - A1 + A3*A2 + A4*A1 + sqrt((A2 - A1 + A3*A2 + A4*A1)^2 - 4*(A2 - A1)*A4*A1));
end

function MichaelisMenten_220(M1, J1, k1, S1)
  k1*S1*M1/(J1 + S1);
end
MichaelisMenten_220 is "Michaelis-Menten";

function Mass_Action_2_221(k1, S1, S2)
  k1*S1*S2;
end

function Mass_Action_1_222(k1, S1)
  k1*S1;
end

model BIOMD0000000056()
  // Chen2004 - Cell Cycle Regulation
  // This is a hypothetical model of cell cycle that describes the molecular mechanism for regulating DNA synthesis, bud emergence, mitosis, and cell division in budding yeast.
  // This model is described in the article:
  // Integrative analysis of cell cycle control in budding yeast.
  // Chen KC, Calzone L, Csikasz-Nagy A, Cross FR, Novak B, Tyson JJ
  // Mol. Biol. Cell. [2004 Aug; Volume: 15 (Issue: 8 )] Page info: 3841-62
  // Abstract:
  // The adaptive responses of a living cell to internal and external signals are controlled by networks of proteins whose interactions are so complex that the functional integration of the network cannot be comprehended by intuitive reasoning alone. Mathematical modeling, based on biochemical rate equations, provides a rigorous and reliable tool for unraveling the complexities of molecular regulatory networks. The budding yeast cell cycle is a challenging test case for this approach, because the control system is known in exquisite detail and its function is constrained by the phenotypic properties of >100 genetically engineered strains. We show that a mathematical model built on a consensus picture of this control system is largely successful in explaining the phenotypes of mutants described so far. A few inconsistencies between the model and experiments indicate aspects of the mechanism that require revision. In addition, the model allows one to frame and critique hypotheses about how the division cycle is regulated in wild-type and mutant cells, to predict the phenotypes of new mutant combinations, and to estimate the effective values of biochemical rate constants that are difficult to measure directly in vivo.
  // The model reproduces the time profiles of the different species in Figure 2 of the paper. The figure depicts the cycle of a daughter cell. Since the Mass Doubling Time (MDT) is 90 minutes, time t=90 from the model simulation will correspond to time t=0 in the paper. The model was successfully tested using MathSBML and SBML odeSolver.
  // To create a valid SBML file, a local parameter k=1 was added in the reaction 'Inactivation_274_CDC20'. Also, in order to annotate the protein and to have the interaction in the reaction graph to match figure 1 of the article, the reaction rate constants k_{mad2}, k_{bub2} and k_{lte1} are considered as species and renamed as MAD2, BUB2 and LTE1 in the model.
  // This model is hosted on BioModels Database and identified by: BIOMD0000000056 .
  // To cite BioModels Database, please use: BioModels Database: An enhanced, curated and annotated resource for published quantitative kinetic models .
  // To the extent possible under law, all copyright and related or neighbouring rights to this encoded model have been dedicated to the public domain worldwide. Please refer to CC0 Public Domain Dedication for more information.
  // This model was automatically converted from BIOMD0000000056 to SBML L3V1 by using libSBML.
  // There were the following warnings during the conversion process:
  // In situations where a mathematical expression refers to extent, the units of extent should be consistent with the global extent units of the model. In models where the 'extentUnits' attribute has not been declared, libSBML does not yet have the functionality to verify accurately the consistency of the units in such expressions.
  // In situations where a mathematical expression refers to a compartment, species or parameter, it is necessary to know the units of the object to establish unit consistency. In models where the units of an object have not been declared, libSBML does not yet have the functionality to accurately verify the consistency of the units in mathematical expressions referring to that object. The units of the <parameter> 'b0' cannot be fully checked. Unit consistency reported as either no errors or further unit errors related to this object may not be accurate.
  // If the attribute 'units' on a given Parameter object has not been set, then the unit of measurement associated with that parameter's value is undefined. Reference: L3V1 Section 4.7.3
  // In situations where a mathematical expression refers to a compartment, species or parameter, it is necessary to know the units of the object to establish unit consistency. In models where the units of an object have not been declared, libSBML does not yet have the functionality to accurately verify the consistency of the units in mathematical expressions referring to that object. The units of the <parameter> 'bub2h' cannot be fully checked. Unit consistency reported as either no errors or further unit errors related to this object may not be accurate.
  // If the attribute 'units' on a given Parameter object has not been set, then the unit of measurement associated with that parameter's value is undefined. Reference: L3V1 Section 4.7.3
  // In situations where a mathematical expression refers to a compartment, species or parameter, it is necessary to know the units of the object to establish unit consistency. In models where the units of an object have not been declared, libSBML does not yet have the functionality to accurately verify the consistency of the units in mathematical expressions referring to that object. The units of the <parameter> 'bub2l' cannot be fully checked. Unit consistency reported as either no errors or further unit errors related to this object may not be accurate.
  // If the attribute 'units' on a given Parameter object has not been set, then the unit of measurement associated with that parameter's value is undefined. Reference: L3V1 Section 4.7.3
  // In situations where a mathematical expression refers to a compartment, species or parameter, it is necessary to know the units of the object to establish unit consistency. In models where the units of an object have not been declared, libSBML does not yet have the functionality to accurately verify the consistency of the units in mathematical expressions referring to that object. The units of the <parameter> 'C0' cannot be fully checked. Unit consistency reported as either no errors or further unit errors related to this object may not be accurate.
  // If the attribute 'units' on a given Parameter object has not been set, then the unit of measurement associated with that parameter's value is undefined. Reference: L3V1 Section 4.7.3
  // In situations where a mathematical expression refers to a compartment, species or parameter, it is necessary to know the units of the object to establish unit consistency. In models where the units of an object have not been declared, libSBML does not yet have the functionality to accurately verify the consistency of the units in mathematical expressions referring to that object. The units of the <parameter> 'CDC15T' cannot be fully checked. Unit consistency reported as either no errors or further unit errors related to this object may not be accurate.
  // If the attribute 'units' on a given Parameter object has not been set, then the unit of measurement associated with that parameter's value is undefined. Reference: L3V1 Section 4.7.3
  // In situations where a mathematical expression refers to a compartment, species or parameter, it is necessary to know the units of the object to establish unit consistency. In models where the units of an object have not been declared, libSBML does not yet have the functionality to accurately verify the consistency of the units in mathematical expressions referring to that object. The units of the <parameter> 'Dn3' cannot be fully checked. Unit consistency reported as either no errors or further unit errors related to this object may not be accurate.
  // If the attribute 'units' on a given Parameter object has not been set, then the unit of measurement associated with that parameter's value is undefined. Reference: L3V1 Section 4.7.3
  // In situations where a mathematical expression refers to a compartment, species or parameter, it is necessary to know the units of the object to establish unit consistency. In models where the units of an object have not been declared, libSBML does not yet have the functionality to accurately verify the consistency of the units in mathematical expressions referring to that object. The units of the <parameter> 'ebudb5' cannot be fully checked. Unit consistency reported as either no errors or further unit errors related to this object may not be accurate.
  // If the attribute 'units' on a given Parameter object has not been set, then the unit of measurement associated with that parameter's value is undefined. Reference: L3V1 Section 4.7.3
  // In situations where a mathematical expression refers to a compartment, species or parameter, it is necessary to know the units of the object to establish unit consistency. In models where the units of an object have not been declared, libSBML does not yet have the functionality to accurately verify the consistency of the units in mathematical expressions referring to that object. The units of the <parameter> 'ebudn2' cannot be fully checked. Unit consistency reported as either no errors or further unit errors related to this object may not be accurate.
  // If the attribute 'units' on a given Parameter object has not been set, then the unit of measurement associated with that parameter's value is undefined. Reference: L3V1 Section 4.7.3
  // In situations where a mathematical expression refers to a compartment, species or parameter, it is necessary to know the units of the object to establish unit consistency. In models where the units of an object have not been declared, libSBML does not yet have the functionality to accurately verify the consistency of the units in mathematical expressions referring to that object. The units of the <parameter> 'ebudn3' cannot be fully checked. Unit consistency reported as either no errors or further unit errors related to this object may not be accurate.
  // If the attribute 'units' on a given Parameter object has not been set, then the unit of measurement associated with that parameter's value is undefined. Reference: L3V1 Section 4.7.3
  // In situations where a mathematical expression refers to a compartment, species or parameter, it is necessary to know the units of the object to establish unit consistency. In models where the units of an object have not been declared, libSBML does not yet have the functionality to accurately verify the consistency of the units in mathematical expressions referring to that object. The units of the <parameter> 'ec1b2' cannot be fully checked. Unit consistency reported as either no errors or further unit errors related to this object may not be accurate.
  // If the attribute 'units' on a given Parameter object has not been set, then the unit of measurement associated with that parameter's value is undefined. Reference: L3V1 Section 4.7.3
  // In situations where a mathematical expression refers to a compartment, species or parameter, it is necessary to know the units of the object to establish unit consistency. In models where the units of an object have not been declared, libSBML does not yet have the functionality to accurately verify the consistency of the units in mathematical expressions referring to that object. The units of the <parameter> 'ec1b5' cannot be fully checked. Unit consistency reported as either no errors or further unit errors related to this object may not be accurate.
  // If the attribute 'units' on a given Parameter object has not been set, then the unit of measurement associated with that parameter's value is undefined. Reference: L3V1 Section 4.7.3
  // In situations where a mathematical expression refers to a compartment, species or parameter, it is necessary to know the units of the object to establish unit consistency. In models where the units of an object have not been declared, libSBML does not yet have the functionality to accurately verify the consistency of the units in mathematical expressions referring to that object. The units of the <parameter> 'ec1k2' cannot be fully checked. Unit consistency reported as either no errors or further unit errors related to this object may not be accurate.
  // If the attribute 'units' on a given Parameter object has not been set, then the unit of measurement associated with that parameter's value is undefined. Reference: L3V1 Section 4.7.3
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  // biomodels.db:MODEL6624073334
  // biomodels.db:BIOMD0000000056
  // isDescribedBy pubmed:15169868
  // kegg.pathway:sce04111
  // isVersionOf GO:0000278
  // isHomologTo reactome:REACT_152
  // model units - time: time

  // Compartments:
  compartment cell = 1 volume;  // isVersionOf GO:0005623

  // Species:
  substanceOnly species BCK2 in cell;  // uniprot:P33306
  substanceOnly species BUB2 in cell = 0.2;  // uniprot:P26448
  substanceOnly species BUD in cell = 0.008473;  // isVersionOf CCO:C0000485
  substanceOnly species C2 in cell = 0.238404;  // hasPart uniprot:P38634 uniprot:P24869 uniprot:P24868
  substanceOnly species C2P in cell = 0.024034;  // hasPart uniprot:P24868 uniprot:P24869 uniprot:P38634
  substanceOnly species C5 in cell = 0.070081;  // hasPart uniprot:P38634 uniprot:P32943 uniprot:P30283
  substanceOnly species C5P in cell = 0.006878;  // hasPart uniprot:P38634 uniprot:P32943 uniprot:P30283
  substanceOnly species CDC14 in cell = 0.468344;  // uniprot:Q00684
  substanceOnly species CDC14T in cell;  // uniprot:Q00684
  substanceOnly species CDC15 in cell = 0.656533;  // uniprot:P27636
  substanceOnly species $CDC15i in cell;  // uniprot:P27636
  substanceOnly species CDC20 in cell = 0.444296;  // uniprot:P26309
  substanceOnly species CDC20i in cell = 1.472044;  // uniprot:P26309
  substanceOnly species CDC6 in cell = 0.10758;  // uniprot:P09119
  substanceOnly species CDC6P in cell = 0.015486;  // uniprot:P09119
  substanceOnly species CDC6T in cell;  // uniprot:P09119
  substanceOnly species CDH1 in cell = 0.930499;  // uniprot:P53197
  substanceOnly species CDH1i in cell = 0.0695;  // uniprot:P53197
  substanceOnly species CKIT in cell;  // hasPart uniprot:P38634 uniprot:P09119
  substanceOnly species CLB2 in cell = 0.1469227;  // hasPart uniprot:P24869 uniprot:P24868
  substanceOnly species CLB2T in cell;  // hasPart uniprot:P24869 uniprot:P24868
  substanceOnly species CLB5 in cell = 0.0518014;  // hasPart uniprot:P32943 uniprot:P30283
  substanceOnly species CLB5T in cell;  // hasPart uniprot:P32943 uniprot:P30283
  substanceOnly species CLN2 in cell = 0.0652511;  // hasPart uniprot:P20438 uniprot:P20437
  substanceOnly species CLN3 in cell;  // uniprot:P13365
  substanceOnly species ESP1 in cell = 0.301313;  // uniprot:Q03018
  substanceOnly species F2 in cell = 0.236058;  // hasPart uniprot:P09119 uniprot:P24868 uniprot:P24869
  substanceOnly species F2P in cell = 0.0273938;  // hasPart uniprot:P09119 uniprot:P24868 uniprot:P24869
  substanceOnly species F5 in cell = 7.24e-5;  // hasPart uniprot:P32943 uniprot:P30283 uniprot:P09119
  substanceOnly species F5P in cell = 7.91e-5;  // hasPart uniprot:P09119 uniprot:P30283 uniprot:P32943
  substanceOnly species $IE in cell;  // GO:0005680
  substanceOnly species IEP in cell = 0.1015;  // GO:0005680
  substanceOnly species LTE1 in cell = 0.1;  // uniprot:P07866
  substanceOnly species MAD2 in cell = 0.01;  // uniprot:P40958
  substanceOnly species MASS in cell = 1.206019;  // isVersionOf FMA:86557
  substanceOnly species MCM1 in cell;  // uniprot:P11746
  substanceOnly species NET1 in cell = 0.018645;  // uniprot:P47035
  substanceOnly species NET1P in cell = 0.970271;  // uniprot:P47035
  substanceOnly species NET1T in cell;  // uniprot:P47035
  substanceOnly species ORI in cell = 0.000909;
  substanceOnly species PDS1 in cell = 0.025612;  // uniprot:P40316
  substanceOnly species $PE in cell;  // uniprot:Q03018
  substanceOnly species PPX in cell = 0.123179;  // uniprot:P38698
  substanceOnly species RENT in cell = 1.04954;  // GO:0030869; hasPart uniprot:P47035 uniprot:P06700 uniprot:Q00684
  substanceOnly species RENTP in cell = 0.6;  // GO:0030869; hasPart uniprot:P06700 uniprot:P47035 uniprot:Q00684
  substanceOnly species SBF in cell;  // uniprot:P11938
  substanceOnly species SIC1 in cell = 0.0228776;  // uniprot:P38634
  substanceOnly species SIC1P in cell = 0.00641;  // uniprot:P38634
  substanceOnly species SIC1T in cell;  // uniprot:P38634
  substanceOnly species SPN in cell = 0.03;  // isVersionOf CCO:P0000392
  substanceOnly species SWI5 in cell = 0.95;  // uniprot:P08153
  substanceOnly species SWI5P in cell = 0.02;  // uniprot:P08153
  substanceOnly species $TEM1GDP in cell;  // uniprot:P38987
  substanceOnly species TEM1GTP in cell = 0.9;  // uniprot:P38987

  // Parameters:
  b0 = 0.054;
  bub2h = 1;
  bub2l = 0.2;
  C0 = 0.4;
  CDC15T = 1;
  Dn3 = 1;
  ebudb5 = 1;
  ebudn2 = 0.25;
  ebudn3 = 0.05;
  ec1b2 = 0.45;
  ec1b5 = 0.1;
  ec1k2 = 0.03;
  ec1n2 = 0.06;
  ec1n3 = 0.3;
  ef6b2 = 0.55;
  ef6b5 = 0.1;
  ef6k2 = 0.03;
  ef6n2 = 0.06;
  ef6n3 = 0.3;
  eicdhb2 = 1.2;
  eicdhb5 = 8;
  eicdhn2 = 0.4;
  eicdhn3 = 0.25;
  eorib2 = 0.45;
  eorib5 = 0.9;
  esbfb5 = 2;
  esbfn2 = 2;
  esbfn3 = 10;
  ESP1T = 1;
  IET = 1;
  J20ppx = 0.15;
  Jacdh = 0.03;
  Jaiep = 0.1;
  Jamcm = 0.1;
  Jasbf = 0.01;
  Jatem = 0.1;
  Jd2c1 = 0.05;
  Jd2f6 = 0.05;
  Jicdh = 0.03;
  Jiiep = 0.1;
  Jimcm = 0.1;
  Jisbf = 0.01;
  Jitem = 0.1;
  Jn3 = 6;
  Jpds = 0.04;
  Jspn = 0.14;
  ka15_p = 0.002; ka15_p is "ka15'";
  ka15_p_p = 1; ka15_p_p is "ka15''";
  ka15p = 0.001;
  ka20_p = 0.05; ka20_p is "ka20'";
  ka20_p_p = 0.2; ka20_p_p is "ka20''";
  kacdh_p = 0.01; kacdh_p is "kacdh'";
  kacdh_p_p = 0.8; kacdh_p_p is "kacdh''";
  kaiep = 0.1;
  kamcm = 1;
  kasb2 = 50;
  kasb5 = 50;
  kasbf = 0.38;
  kasesp = 50;
  kasf2 = 15;
  kasf5 = 0.01;
  kasrent = 200;
  kasrentp = 1;
  kaswi = 2;
  kd14 = 0.1;
  kd1c1 = 0.01;
  kd1f6 = 0.01;
  kd1pds_p = 0.01; kd1pds_p is "kd1pds'";
  kd20 = 0.3;
  kd2c1 = 1;
  kd2f6 = 1;
  kd2pds_p_p = 0.2; kd2pds_p_p is "kd2pds''";
  kd3c1 = 1;
  kd3f6 = 1;
  kd3pds_p_p = 0.04; kd3pds_p_p is "kd3pds''";
  kdb2_p = 0.003; kdb2_p is "kdb2'";
  kdb2_p_p = 0.4; kdb2_p_p is "kdb2''";
  kdb2p = 0.15;
  kdb5_p = 0.01; kdb5_p is "kdb5'";
  kdb5_p_p = 0.16; kdb5_p_p is "kdb5''";
  kdbud = 0.06;
  kdcdh = 0.01;
  kdib2 = 0.05;
  kdib5 = 0.06;
  kdiesp = 0.5;
  kdif2 = 0.5;
  kdif5 = 0.01;
  kdirent = 1;
  kdirentp = 2;
  kdn2 = 0.12;
  kdnet = 0.03;
  kdori = 0.06;
  kdppx_p = 0.17; kdppx_p is "kdppx'";
  kdppx_p_p = 2; kdppx_p_p is "kdppx''";
  kdspn = 0.06;
  kdswi = 0.08;
  KEZ = 0.3;
  KEZ2 = 0.2;
  ki15 = 0.5;
  kicdh_p = 0.001; kicdh_p is "kicdh'";
  kicdh_p_p = 0.08; kicdh_p_p is "kicdh''";
  kiiep = 0.15;
  kimcm = 0.15;
  kisbf_p = 0.6; kisbf_p is "kisbf'";
  kisbf_p_p = 8; kisbf_p_p is "kisbf''";
  kiswi = 0.05;
  kkpnet_p = 0.01; kkpnet_p is "kkpnet'";
  kkpnet_p_p = 0.6; kkpnet_p_p is "kkpnet''";
  kppc1 = 4;
  kppf6 = 4;
  kppnet_p = 0.05; kppnet_p is "kppnet'";
  kppnet_p_p = 3; kppnet_p_p is "kppnet''";
  ks14 = 0.2;
  ks1pds_p_p = 0.03; ks1pds_p_p is "ks1pds''";
  ks20_p = 0.006; ks20_p is "ks20'";
  ks20_p_p = 0.6; ks20_p_p is "ks20''";
  ks2pds_p_p = 0.055; ks2pds_p_p is "ks2pds''";
  ksb2_p = 0.001; ksb2_p is "ksb2'";
  ksb2_p_p = 0.04; ksb2_p_p is "ksb2''";
  ksb5_p = 0.0008; ksb5_p is "ksb5'";
  ksb5_p_p = 0.005; ksb5_p_p is "ksb5''";
  ksbud = 0.2;
  ksc1_p = 0.012; ksc1_p is "ksc1'";
  ksc1_p_p = 0.12; ksc1_p_p is "ksc1''";
  kscdh = 0.01;
  ksf6_p = 0.024; ksf6_p is "ksf6'";
  ksf6_p_p = 0.12; ksf6_p_p is "ksf6''";
  ksf6_p_p_p = 0.004; ksf6_p_p_p is "ksf6'''";
  ksn2_p = 0; ksn2_p is "ksn2'";
  ksn2_p_p = 0.15; ksn2_p_p is "ksn2''";
  ksnet = 0.084;
  ksori = 2;
  kspds_p = 0; kspds_p is "kspds'";
  ksppx = 0.1;
  ksspn = 0.1;
  ksswi_p = 0.005; ksswi_p is "ksswi'";
  ksswi_p_p = 0.08; ksswi_p_p is "ksswi''";
  lte1h = 1;
  lte1l = 0.1;
  mad2h = 8;
  mad2l = 0.01;
  mdt = 90;
  TEM1T = 1;

  // Assignment rules:
  BCK2 := b0*MASS;
  Visbf := kisbf_p + kisbf_p_p*CLB2;
  CLN3 := C0*Dn3*MASS/(Jn3 + Dn3*MASS);
  Vppc1 := kppc1*CDC14;
  Vppf6 := kppf6*CDC14;
  Vaiep := kaiep*CLB2;
  Vacdh := kacdh_p + kacdh_p_p*CDC14;
  Vicdh := kicdh_p + kicdh_p_p*(eicdhn3*CLN3 + eicdhn2*CLN2 + eicdhb5*CLB5 + eicdhb2*CLB2);
  Vkpnet := (kkpnet_p + kkpnet_p_p*CDC15)*MASS;
  Vppnet := kppnet_p + kppnet_p_p*PPX;
  Vasbf := kasbf*(esbfn2*CLN2 + esbfn3*(CLN3 + BCK2) + esbfb5*CLB5);
  SBF := GK_219(Vasbf, Visbf, Jasbf, Jisbf);
  MCM1 := GK_219(kamcm*CLB2, kimcm, Jamcm, Jimcm);
  mu := ln(2)/mdt;
  D := 1.026/mu - 32;
  F := exp(-mu*D);
  Vd2c1 := kd2c1*(ec1n3*CLN3 + ec1k2*BCK2 + ec1n2*CLN2 + ec1b5*CLB5 + ec1b2*CLB2);
  Vd2f6 := kd2f6*(ef6n3*CLN3 + ef6k2*BCK2 + ef6n2*CLN2 + ef6b5*CLB5 + ef6b2*CLB2);
  Vkpc1 := kd1c1 + Vd2c1/(Jd2c1 + SIC1 + C2 + C5 + SIC1P + C2P + C5P);
  Vkpf6 := kd1f6 + Vd2f6/(Jd2f6 + CDC6 + F2 + F5 + CDC6P + F2P + F5P);
  Vdb2 := kdb2_p + kdb2_p_p*CDH1 + kdb2p*CDC20;
  Vdb5 := kdb5_p + kdb5_p_p*CDC20;
  Vdpds := kd1pds_p + kd2pds_p_p*CDC20 + kd3pds_p_p*CDH1;
  Vdppx := kdppx_p + kdppx_p_p*(J20ppx + CDC20)*Jpds/(Jpds + PDS1);
  CLB2T := CLB2 + C2 + C2P + F2 + F2P;
  CLB5T := CLB5 + C5 + C5P + F5 + F5P;
  CDC14T := CDC14 + RENT + RENTP;
  NET1T := NET1 + NET1P + RENT + RENTP;
  SIC1T := SIC1 + C2 + C5 + SIC1P + C2P + C5P;
  CDC6T := CDC6 + F2 + F5 + CDC6P + F2P + F5P;
  CKIT := SIC1T + CDC6T;
  CDC15i := CDC15T - CDC15;
  IE := IET - IEP;
  PE := ESP1T - ESP1;
  TEM1GDP := TEM1T - TEM1GTP;

  // Reactions:
  Growth: => MASS; mu*MASS;  // isVersionOf GO:0016049
  Synthesis_of_CLN2: => CLN2; (ksn2_p + ksn2_p_p*SBF)*MASS;  // modifiers: SBF, MASS; isVersionOf kegg.pathway:sce04110 GO:0006412
  Degradation_of_CLN2: CLN2 => ; Mass_Action_1_222(kdn2, CLN2);  // isVersionOf GO:0008054
  Synthesis_of_CLB2: => CLB2; (ksb2_p + ksb2_p_p*MCM1)*MASS;  // modifiers: MCM1, MASS; isVersionOf GO:0006412
  Degradation_of_CLB2: CLB2 => ; Mass_Action_1_222(Vdb2, CLB2);  // isVersionOf GO:0051437 GO:0008054
  Synthesis_of_CLB5: => CLB5; (ksb5_p + ksb5_p_p*SBF)*MASS;  // modifiers: SBF, MASS; isVersionOf GO:0006412
  Degradation_of_CLB5: CLB5 => ; Mass_Action_1_222(Vdb5, CLB5);  // isVersionOf GO:0008054 GO:0051437
  Synthesis_of_SIC1: => SIC1; ksc1_p + ksc1_p_p*SWI5;  // modifiers: SWI5; isVersionOf GO:0006412
  Phosphorylation_of_SIC1: SIC1 => SIC1P; Mass_Action_1_222(Vkpc1, SIC1);  // isVersionOf ec-code:2.7.11.22 GO:0004693 GO:0006468
  Dephosphorylation_of_SIC1: SIC1P => SIC1; Mass_Action_1_222(Vppc1, SIC1P);  // isVersionOf ec-code:3.1.3.48 GO:0004721 GO:0006470
  Fast_Degradation_of_SIC1P: SIC1P => ; Mass_Action_1_222(kd3c1, SIC1P);  // isVersionOf GO:0030163
  Assoc_of_CLB2_and_SIC1: CLB2 + SIC1 => C2; Mass_Action_2_221(kasb2, CLB2, SIC1); Assoc_of_CLB2_and_SIC1 is "Assoc. of CLB2 and SIC1";  // isVersionOf GO:0005515 GO:0043623
  Dissoc_of_CLB2SIC1_complex: C2 => CLB2 + SIC1; Mass_Action_1_222(kdib2, C2); Dissoc_of_CLB2SIC1_complex is "Dissoc. of CLB2/SIC1 complex";  // isVersionOf GO:0043624
  Assoc_of_CLB5_and_SIC1: CLB5 + SIC1 => C5; Mass_Action_2_221(kasb5, CLB5, SIC1); Assoc_of_CLB5_and_SIC1 is "Assoc. of CLB5 and SIC1";  // isVersionOf GO:0043623 GO:0005515
  Dissoc_of_CLB5SIC1: C5 => CLB5 + SIC1; Mass_Action_1_222(kdib5, C5); Dissoc_of_CLB5SIC1 is "Dissoc. of CLB5/SIC1";  // isVersionOf GO:0043624
  Phosphorylation_of_C2: C2 => C2P; Mass_Action_1_222(Vkpc1, C2);  // isVersionOf ec-code:2.7.11.22 GO:0006468 GO:0004693
  Dephosphorylation_of_C2P: C2P => C2; Mass_Action_1_222(Vppc1, C2P);  // isVersionOf ec-code:3.1.3.48 GO:0006470 GO:0004721
  Phosphorylation_of_C5: C5 => C5P; Mass_Action_1_222(Vkpc1, C5);  // isVersionOf ec-code:2.7.11.22 GO:0006468 GO:0004693
  Dephosphorylation_of_C5P: C5P => C5; Mass_Action_1_222(Vppc1, C5P);  // isVersionOf ec-code:3.1.3.48 GO:0006470 GO:0004721
  Degradation_of_CLB2_in_C2: C2 => SIC1; Mass_Action_1_222(Vdb2, C2);  // isVersionOf GO:0051437 GO:0008054
  Degradation_of_CLB5_in_C5: C5 => SIC1; Mass_Action_1_222(Vdb5, C5);  // isVersionOf GO:0008054 GO:0051437
  Degradation_of_SIC1_in_C2P: C2P => CLB2; Mass_Action_1_222(kd3c1, C2P);  // isVersionOf GO:0030163
  Degradation_of_SIC1P_in_C5P_: C5P => CLB5; Mass_Action_1_222(kd3c1, C5P);  // isVersionOf GO:0030163
  Degradation_of_CLB2_in_C2P: C2P => SIC1P; Mass_Action_1_222(Vdb2, C2P);  // isVersionOf GO:0051437 GO:0008054
  Degradation_of_CLB5_in_C5P: C5P => SIC1P; Mass_Action_1_222(Vdb5, C5P);  // isVersionOf GO:0051437 GO:0008054
  CDC6_synthesis: => CDC6; ksf6_p + ksf6_p_p*SWI5 + ksf6_p_p_p*SBF;  // modifiers: SWI5, SBF; isVersionOf GO:0006412
  Phosphorylation_of_CDC6: CDC6 => CDC6P; Mass_Action_1_222(Vkpf6, CDC6);  // isVersionOf ec-code:2.7.11.22 GO:0004693 GO:0006468
  Dephosphorylation_of_CDC6: CDC6P => CDC6; Mass_Action_1_222(Vppf6, CDC6P);  // isVersionOf ec-code:3.1.3.48 GO:0004721 GO:0006470
  Degradation_of_CDC6P: CDC6P => ; Mass_Action_1_222(kd3f6, CDC6P);  // isVersionOf GO:0030163
  CLB2CDC6_complex_formation: CLB2 + CDC6 => F2; Mass_Action_2_221(kasf2, CLB2, CDC6); CLB2CDC6_complex_formation is "CLB2/CDC6 complex formation";  // isVersionOf GO:0043623 GO:0005515
  CLB2CDC6_dissociation: F2 => CLB2 + CDC6; Mass_Action_1_222(kdif2, F2); CLB2CDC6_dissociation is "CLB2/CDC6 dissociation";  // isVersionOf GO:0043624
  CLB5CDC6_complex_formation: CLB5 + CDC6 => F5; Mass_Action_2_221(kasf5, CLB5, CDC6); CLB5CDC6_complex_formation is "CLB5/CDC6 complex formation";  // isVersionOf GO:0043623 GO:0005515
  CLB5CDC6_dissociation: F5 => CLB5 + CDC6; Mass_Action_1_222(kdif5, F5); CLB5CDC6_dissociation is "CLB5/CDC6 dissociation";  // isVersionOf GO:0043624
  F2_phosphorylation: F2 => F2P; Mass_Action_1_222(Vkpf6, F2);  // isVersionOf ec-code:2.7.11.22 GO:0006468 GO:0004693
  F2P_dephosphorylation: F2P => F2; Mass_Action_1_222(Vppf6, F2P);  // isVersionOf ec-code:3.1.3.48 GO:0006470 GO:0004721
  F5_phosphorylation: F5 => F5P; Mass_Action_1_222(Vkpf6, F5);  // isVersionOf ec-code:2.7.11.22 GO:0006468 GO:0004693
  F5P_dephosphorylation: F5P => F5; Mass_Action_1_222(Vppf6, F5P);  // isVersionOf ec-code:3.1.3.48 GO:0006470 GO:0004721
  CLB2_degradation_in_F2: F2 => CDC6; Mass_Action_1_222(Vdb2, F2);  // isVersionOf GO:0051437 GO:0008054
  CLB5_degradation_in_F5: F5 => CDC6; Mass_Action_1_222(Vdb5, F5);  // isVersionOf GO:0051437 GO:0008054
  CDC6_degradation_in_F2P: F2P => CLB2; Mass_Action_1_222(kd3f6, F2P);  // isVersionOf GO:0030163
  CDC6_degradation_in_F5P: F5P => CLB5; Mass_Action_1_222(kd3f6, F5P);  // isVersionOf GO:0030163
  CLB2_degradation_in_F2P: F2P => CDC6P; Mass_Action_1_222(Vdb2, F2P);  // isVersionOf GO:0051437 GO:0008054
  CLB5_degradation_in_F5P: F5P => CDC6P; Mass_Action_1_222(Vdb5, F5P);  // isVersionOf GO:0051437 GO:0008054
  Synthesis_of_SWI5: => SWI5; ksswi_p + ksswi_p_p*MCM1;  // modifiers: MCM1; isVersionOf GO:0006412
  Degradation_of_SWI5: SWI5 => ; Mass_Action_1_222(kdswi, SWI5);  // isVersionOf GO:0030163
  Degradation_of_SWI5P: SWI5P => ; Mass_Action_1_222(kdswi, SWI5P);  // isVersionOf GO:0030163
  Activation_of_SWI5: SWI5P => SWI5; Mass_Action_1_222(kaswi*CDC14, SWI5P);  // modifiers: CDC14; isVersionOf ec-code:3.1.3.48 GO:0006470 GO:0051091 GO:0004721
  Inactivation_of_SWI5: SWI5 => SWI5P; Mass_Action_1_222(kiswi*CLB2, SWI5);  // modifiers: CLB2; isVersionOf ec-code:2.7.11.22 GO:0006468 GO:0004693 GO:0043433
  Activation_of_IEP: $IE => IEP; MichaelisMenten_220(Vaiep, Jaiep, 1, IE);  // isVersionOf ec-code:2.7.11.22 GO:0006468 GO:0004693
  Inactivation_1: IEP => $IE; MichaelisMenten_220(1, Jiiep, kiiep, IEP);  // isVersionOf GO:0001100 GO:0006470
  Synthesis_of_inactive_CDC20: => CDC20i; ks20_p + ks20_p_p*MCM1;  // modifiers: MCM1; isVersionOf GO:0006412
  Degradation_of_inactiveCDC20: CDC20i => ; Mass_Action_1_222(kd20, CDC20i);  // isVersionOf GO:0030163
  Degradation_of_active_CDC20: CDC20 => ; Mass_Action_1_222(kd20, CDC20);  // isVersionOf GO:0030163
  Activation_of_CDC20: CDC20i => CDC20; Mass_Action_1_222(ka20_p + ka20_p_p*IEP, CDC20i);  // modifiers: IEP; isVersionOf GO:0031536
  Inactivation_2: CDC20 => CDC20i; k*Mass_Action_1_222(MAD2, CDC20);  // modifiers: MAD2; isVersionOf GO:0001100
    k = 1;
  CDH1_synthesis: => CDH1; kscdh;  // isVersionOf GO:0006412
  CDH1_degradation: CDH1 => ; Mass_Action_1_222(kdcdh, CDH1);  // isVersionOf GO:0030163
  CDH1i_degradation: CDH1i => ; Mass_Action_1_222(kdcdh, CDH1i);  // isVersionOf GO:0030163
  CDH1i_activation: CDH1i => CDH1; MichaelisMenten_220(Vacdh, Jacdh, 1, CDH1i);  // isVersionOf ec-code:3.1.3.48 GO:0004721 GO:0006470 GO:0031536
  Inactivation_3: CDH1 => CDH1i; MichaelisMenten_220(Vicdh, Jicdh, 1, CDH1);  // isVersionOf ec-code:2.7.11.22 GO:0004693 GO:0001100 GO:0006468
  CDC14_synthesis: => CDC14; ks14;  // isVersionOf GO:0006412
  CDC14_degradation: CDC14 => ; Mass_Action_1_222(kd14, CDC14);  // isVersionOf GO:0030163
  Assoc_with_NET1_to_form_RENT: CDC14 + NET1 => RENT; Mass_Action_2_221(kasrent, CDC14, NET1); Assoc_with_NET1_to_form_RENT is "Assoc. with NET1 to form RENT";  // isVersionOf GO:0030869 GO:0005515 GO:0043623
  Dissoc_from_RENT: RENT => NET1 + CDC14; Mass_Action_1_222(kdirent, RENT); Dissoc_from_RENT is "Dissoc. from RENT";  // isVersionOf GO:0043624
  Assoc_with_NET1P_to_form_RENTP: CDC14 + NET1P => RENTP; Mass_Action_2_221(kasrentp, CDC14, NET1P);  // hasPart kegg.pathway:ko04111; isVersionOf GO:0043623 GO:0005515
  Dissoc_from_RENP: RENTP => CDC14 + NET1P; Mass_Action_1_222(kdirentp, RENTP); Dissoc_from_RENP is "Dissoc. from RENP";  // isVersionOf GO:0043624
  Net1_synthesis: => NET1; ksnet;  // isVersionOf GO:0006412
  Net1_degradation: NET1 => ; Mass_Action_1_222(kdnet, NET1);  // isVersionOf GO:0030163
  Net1P_degradation: NET1P => ; Mass_Action_1_222(kdnet, NET1P);  // isVersionOf GO:0030163
  NET1_phosphorylation: NET1 => NET1P; Mass_Action_1_222(Vkpnet, NET1);  // isVersionOf ec-code:2.7.11.1 GO:0004672 GO:0006468 GO:0031536
  dephosphorylation_1: NET1P => NET1; Mass_Action_1_222(Vppnet, NET1P);  // isVersionOf ec-code:3.6.1.11 GO:0004309 GO:0006470
  RENT_phosphorylation: RENT => RENTP; Mass_Action_1_222(Vkpnet, RENT);  // isVersionOf ec-code:2.7.11.1 GO:0031536 GO:0006468 GO:0004672
  dephosphorylation_2: RENTP => RENT; Mass_Action_1_222(Vppnet, RENTP);  // isVersionOf ec-code:3.6.1.11 GO:0006470 GO:0004309
  Degradation_of_NET1_in_RENT: RENT => CDC14; Mass_Action_1_222(kdnet, RENT);  // isVersionOf GO:0030163
  Degradation_of_NET1P_in_RENTP: RENTP => CDC14; Mass_Action_1_222(kdnet, RENTP);  // isVersionOf GO:0030163
  Degradation_of_CDC14_in_RENT: RENT => NET1; Mass_Action_1_222(kd14, RENT);  // isVersionOf GO:0030163
  Degradation_of_CDC14_in_RENTP: RENTP => NET1P; Mass_Action_1_222(kd14, RENTP);  // isVersionOf GO:0030163
  TEM1_activation: $TEM1GDP => TEM1GTP; MichaelisMenten_220(LTE1, Jatem, 1, TEM1GDP);  // modifiers: LTE1; isVersionOf GO:0005525 GO:0031536 GO:0005515
  inactivation_1: TEM1GTP => $TEM1GDP; MichaelisMenten_220(BUB2, Jitem, 1, TEM1GTP);  // modifiers: BUB2; isVersionOf GO:0005096 GO:0007094 GO:0005515
  CDC15_activation: $CDC15i => CDC15; Mass_Action_1_222(ka15_p*TEM1GDP + ka15_p_p*TEM1GTP + ka15p*CDC14, CDC15i);  // modifiers: TEM1GDP, TEM1GTP, CDC14; isVersionOf ec-code:2.7.11.1 ec-code:3.1.3.48 GO:0004721 GO:0031536
  inactivation_2: CDC15 => $CDC15i; Mass_Action_1_222(ki15, CDC15);  // isVersionOf ec-code:2.7.11.1 GO:0006469 GO:0001100
  PPX_synthesis: => PPX; ksppx;  // isVersionOf ec-code:3.6.1.11 GO:0006412
  degradation_1: PPX => ; Mass_Action_1_222(Vdppx, PPX);  // isVersionOf GO:0030163
  PDS1_synthesis: => PDS1; kspds_p + ks1pds_p_p*SBF + ks2pds_p_p*MCM1;  // modifiers: SBF, MCM1; isVersionOf GO:0006412
  degradation_2: PDS1 => ; Mass_Action_1_222(Vdpds, PDS1);  // isVersionOf GO:0051437 GO:0030163
  Degradation_of_PDS1_in_PE: $PE => ESP1; Mass_Action_1_222(Vdpds, PE);  // isVersionOf GO:0030163 GO:0051437
  Assoc_with_ESP1_to_form_PE: PDS1 + ESP1 => $PE; Mass_Action_2_221(kasesp, PDS1, ESP1); Assoc_with_ESP1_to_form_PE is "Assoc. with ESP1 to form PE";  // isVersionOf GO:0043623 GO:0005515 GO:0043027
  Disso_from_PE: $PE => PDS1 + ESP1; Mass_Action_1_222(kdiesp, PE); Disso_from_PE is "Disso. from PE";  // isVersionOf GO:0043280 GO:0043624
  DNA_synthesis: => ORI; ksori*(eorib5*CLB5 + eorib2*CLB2);  // modifiers: CLB5, CLB2; isVersionOf GO:0006261 GO:0000082
  Negative_regulation_of_DNA_synthesis: ORI => ; Mass_Action_1_222(kdori, ORI);  // isVersionOf GO:0008156
  Budding: => BUD; ksbud*(ebudn2*CLN2 + ebudn3*CLN3 + ebudb5*CLB5);  // modifiers: CLN2, CLN3, CLB5; isVersionOf GO:0045782
  Negative_regulation_of_Cell_budding: BUD => ; Mass_Action_1_222(kdbud, BUD);  // isVersionOf GO:0045781
  Spindle_formation: => SPN; ksspn*CLB2/(Jspn + CLB2);  // modifiers: CLB2; isVersionOf GO:0051225
  Spindle_disassembly: SPN => ; Mass_Action_1_222(kdspn, SPN);  // isVersionOf GO:0051228

  // Events:
  reset_ORI: at (CLB2 + CLB5 - KEZ2 < 0): ORI = 0;  // isHomologTo reactome:REACT_2243; isVersionOf GO:0030174
  start_S: at (ORI - 1 > 0): MAD2 = mad2h, BUB2 = bub2h; start_S is "start DNA synthesis";  // isHomologTo reactome:REACT_1095; hasVersion GO:0006270; isVersionOf GO:0010571
  spindle_checkpoint: at (SPN - 1 > 0): MAD2 = mad2l, LTE1 = lte1h, BUB2 = bub2l;  // isVersionOf GO:0031577
  cell_division: at (CLB2 - KEZ < 0): MASS = F*MASS, LTE1 = lte1l, BUD = 0, SPN = 0;  // isVersionOf GO:0051301

  // Unit definitions:
  unit time = 60 second; time is "min";
  unit volume = litre;
  unit substance = mole;
end
