// SBML level 3 version 1

model Bianconi2012Model()
  // model units - substance: mole, time: second, extent: mole

  // Compartments:
  compartment cell_nsclc = 1 litre;

  // Species:
  species Sos1_4430401P03Rik_9630010N06_AI449023_active in cell_nsclc = 0;
  species Sos1_4430401P03Rik_9630010N06_AI449023 in cell_nsclc = 120000/cell_nsclc;
  species Egfr_9030024J15Rik_AI552599_Erbb_Errb1_Errp_Wa5_wa_2_wa2_active in cell_nsclc = 8000/cell_nsclc;
  species Hras_H_ras_Ha_ras_Harvey_ras_Hras_1_Hras1_Kras2_c_H_ras_c_Ha_ras_c_rasHa_ras_active in cell_nsclc = 0;
  species Hras_H_ras_Ha_ras_Harvey_ras_Hras_1_Hras1_Kras2_c_H_ras_c_Ha_ras_c_rasHa_ras in cell_nsclc = 120000/cell_nsclc;
  species Mapk1_9030612K14Rik_AA407128_AU018647_C78273_ERK_Erk2_MAPK2_PRKM2_Prkm1_p41mapk_p42mapk_active in cell_nsclc = 0;
  species Mapk1_9030612K14Rik_AA407128_AU018647_C78273_ERK_Erk2_MAPK2_PRKM2_Prkm1_p41mapk_p42mapk in cell_nsclc = 600000/cell_nsclc;
  species Map2k1_MAPKK1_MEKK1_Mek1_Prkmk1_active in cell_nsclc = 0;
  species P90Rsk_active in cell_nsclc = 0;
  species Csf1r_AI323359_CD115_CSF_1R_Csfmr_Fim_2_Fms_M_CSF_R_M_CSFR in cell_nsclc = 800/cell_nsclc;
  species Pik3ca_6330412C24Rik_caPI3K_p110_p110alpha_active in cell_nsclc = 0;
  species Pik3ca_6330412C24Rik_caPI3K_p110_p110alpha in cell_nsclc = 120000/cell_nsclc;
  species Akt1_Akt_PKB_PKB_Akt_PKBalpha_Rac_active in cell_nsclc = 0;
  species Akt1_Akt_PKB_PKB_Akt_PKBalpha_Rac in cell_nsclc = 600000/cell_nsclc;
  species PP2A in cell_nsclc = 120000/cell_nsclc;
  species Raf1_6430402F14Rik_AA990557_BB129353_Craf1_D830050J10Rik_Raf_1_c_Raf_v_Raf_active in cell_nsclc = 0;
  species Raf1_6430402F14Rik_AA990557_BB129353_Craf1_D830050J10Rik_Raf_1_c_Raf_v_Raf in cell_nsclc = 120000/cell_nsclc;
  species Map2k1_MAPKK1_MEKK1_Mek1_Prkmk1 in cell_nsclc = 600000/cell_nsclc;
  species Rasa2_5430433H21Rik_AA517451_AU023900_GAP1m_active in cell_nsclc = 120000/cell_nsclc;
  species RafPP in cell_nsclc = 120000/cell_nsclc;
  species P90Rsk in cell_nsclc = 120000/cell_nsclc;

  // Parameters:
  reaction_1_KM_SOS_E = 6086070 moles_per_second;
  reaction_1_k_SOS_E = 694.731 moles_per_second;
  reaction_2_KM_Ras_SOS = 35954.3 moles_per_second;
  reaction_2_k_Ras_SOS = 32.344 moles_per_second;
  reaction_3_gamma_EGFR = 0.02 moles_per_second;
  reaction_4_KM_ERK_MekActive = 1007340 moles_per_second;
  reaction_4_k_ERK_MekActive = 9.85367 moles_per_second;
  reaction_5_KM_D_SOS_P90Rsk = 896896 moles_per_second;
  reaction_5_k_D_SOS_P90Rsk = 161197 moles_per_second;
  reaction_6_KM_A_SOS_I = 100000 moles_per_second;
  reaction_6_k_A_SOS_I = 500 moles_per_second;
  reaction_7_KM_PI3K_IGF1R = 184912 moles_per_second;
  reaction_7_k_PI3K_IGF1R = 10.6737 moles_per_second;
  reaction_8_KM_PI3K_EGF1R = 184912 moles_per_second;
  reaction_8_k_PI3K_EGF1R = 10.6737 moles_per_second;
  reaction_9_KM_AKT_PI3K = 653951 moles_per_second;
  reaction_9_k_AKT_PI3K = 0.0566279 moles_per_second;
  reaction_10_kd_AKT = 0.005 moles_per_second;
  reaction_11_KM_ERKactive_PP2A = 3496490 moles_per_second;
  reaction_11_k_ERKactive_PP2A = 8.8912 moles_per_second;
  reaction_12_KM_PI3K_Ras = 272056 moles_per_second;
  reaction_12_k_PI3K_Ras = 0.0771067 moles_per_second;
  reaction_13_KM_Raf_RasActive = 62464.6 moles_per_second;
  reaction_13_k_Raf_RasActive = 0.884096 moles_per_second;
  reaction_14_KM_Mek_Raf_active = 4768350 moles_per_second;
  reaction_14_k_Mek_Raf_active = 185.759 moles_per_second;
  reaction_15_KM_Raf_AKT = 119355 moles_per_second;
  reaction_15_k_Raf_AKT = 15.1212 moles_per_second;
  reaction_16_KM_RasActiveRasGap = 1432410 moles_per_second;
  reaction_16_k_RasActiveRasGap = 1509.36 moles_per_second;
  reaction_17_KM_MekActivePP2A = 518753 moles_per_second;
  reaction_17_k_MekActivePP2A = 2.83243 moles_per_second;
  reaction_18_gamma_IGFR = 0.02 moles_per_second;
  reaction_19_kd_PI3K_a = 0.005 moles_per_second;
  reaction_20_KM_RasActive_RafPP = 1061.71 moles_per_second;
  reaction_20_k_RasActive_RafPP = 0.126329 moles_per_second;
  reaction_21_KM_P90Rsk_ERKActive = 763523 moles_per_second;
  reaction_21_k_P90Rsk_ERKActive = 0.0213697 moles_per_second;
  reaction_22_kd_P90Rsk = 0.005 moles_per_second;

  // Reactions:
  SOS_conformational_activation: Sos1_4430401P03Rik_9630010N06_AI449023 => Sos1_4430401P03Rik_9630010N06_AI449023_active; reaction_1_k_SOS_E*Egfr_9030024J15Rik_AI552599_Erbb_Errb1_Errp_Wa5_wa_2_wa2_active*Sos1_4430401P03Rik_9630010N06_AI449023/(reaction_1_KM_SOS_E + Sos1_4430401P03Rik_9630010N06_AI449023);  // modifiers: Egfr_9030024J15Rik_AI552599_Erbb_Errb1_Errp_Wa5_wa_2_wa2_active
  kRas_activation: Hras_H_ras_Ha_ras_Harvey_ras_Hras_1_Hras1_Kras2_c_H_ras_c_Ha_ras_c_rasHa_ras => Hras_H_ras_Ha_ras_Harvey_ras_Hras_1_Hras1_Kras2_c_H_ras_c_Ha_ras_c_rasHa_ras_active; reaction_2_k_Ras_SOS*Sos1_4430401P03Rik_9630010N06_AI449023_active*Hras_H_ras_Ha_ras_Harvey_ras_Hras_1_Hras1_Kras2_c_H_ras_c_Ha_ras_c_rasHa_ras/(reaction_2_KM_Ras_SOS + Hras_H_ras_Ha_ras_Harvey_ras_Hras_1_Hras1_Kras2_c_H_ras_c_Ha_ras_c_rasHa_ras);  // modifiers: Sos1_4430401P03Rik_9630010N06_AI449023_active
  EGFR_degradation: Egfr_9030024J15Rik_AI552599_Erbb_Errb1_Errp_Wa5_wa_2_wa2_active => ; reaction_3_gamma_EGFR*Egfr_9030024J15Rik_AI552599_Erbb_Errb1_Errp_Wa5_wa_2_wa2_active;
  ERK_activation_by_Mek: Mapk1_9030612K14Rik_AA407128_AU018647_C78273_ERK_Erk2_MAPK2_PRKM2_Prkm1_p41mapk_p42mapk => Mapk1_9030612K14Rik_AA407128_AU018647_C78273_ERK_Erk2_MAPK2_PRKM2_Prkm1_p41mapk_p42mapk_active; reaction_4_k_ERK_MekActive*Map2k1_MAPKK1_MEKK1_Mek1_Prkmk1_active*Mapk1_9030612K14Rik_AA407128_AU018647_C78273_ERK_Erk2_MAPK2_PRKM2_Prkm1_p41mapk_p42mapk/(reaction_4_KM_ERK_MekActive + Mapk1_9030612K14Rik_AA407128_AU018647_C78273_ERK_Erk2_MAPK2_PRKM2_Prkm1_p41mapk_p42mapk);  // modifiers: Map2k1_MAPKK1_MEKK1_Mek1_Prkmk1_active
  SOS_deactivation_by_P90: Sos1_4430401P03Rik_9630010N06_AI449023_active => Sos1_4430401P03Rik_9630010N06_AI449023; reaction_5_k_D_SOS_P90Rsk*P90Rsk_active*Sos1_4430401P03Rik_9630010N06_AI449023_active/(reaction_5_KM_D_SOS_P90Rsk + Sos1_4430401P03Rik_9630010N06_AI449023_active);  // modifiers: P90Rsk_active
  SOS_activation_by_IGF: Sos1_4430401P03Rik_9630010N06_AI449023 => Sos1_4430401P03Rik_9630010N06_AI449023_active; reaction_6_k_A_SOS_I*Csf1r_AI323359_CD115_CSF_1R_Csfmr_Fim_2_Fms_M_CSF_R_M_CSFR*Sos1_4430401P03Rik_9630010N06_AI449023/(reaction_6_KM_A_SOS_I + Sos1_4430401P03Rik_9630010N06_AI449023);  // modifiers: Csf1r_AI323359_CD115_CSF_1R_Csfmr_Fim_2_Fms_M_CSF_R_M_CSFR
  PI3KCA_activation_by_IGF1R: Pik3ca_6330412C24Rik_caPI3K_p110_p110alpha => Pik3ca_6330412C24Rik_caPI3K_p110_p110alpha_active; reaction_7_k_PI3K_IGF1R*Csf1r_AI323359_CD115_CSF_1R_Csfmr_Fim_2_Fms_M_CSF_R_M_CSFR*Pik3ca_6330412C24Rik_caPI3K_p110_p110alpha/(reaction_7_KM_PI3K_IGF1R + Pik3ca_6330412C24Rik_caPI3K_p110_p110alpha);  // modifiers: Csf1r_AI323359_CD115_CSF_1R_Csfmr_Fim_2_Fms_M_CSF_R_M_CSFR
  PI3KCA_activation_by_EGF: Pik3ca_6330412C24Rik_caPI3K_p110_p110alpha => Pik3ca_6330412C24Rik_caPI3K_p110_p110alpha_active; reaction_8_k_PI3K_EGF1R*Egfr_9030024J15Rik_AI552599_Erbb_Errb1_Errp_Wa5_wa_2_wa2_active*Pik3ca_6330412C24Rik_caPI3K_p110_p110alpha/(reaction_8_KM_PI3K_EGF1R + Pik3ca_6330412C24Rik_caPI3K_p110_p110alpha);  // modifiers: Egfr_9030024J15Rik_AI552599_Erbb_Errb1_Errp_Wa5_wa_2_wa2_active
  AKT_activation_by_PI3KCA: Akt1_Akt_PKB_PKB_Akt_PKBalpha_Rac => Akt1_Akt_PKB_PKB_Akt_PKBalpha_Rac_active; reaction_9_k_AKT_PI3K*Pik3ca_6330412C24Rik_caPI3K_p110_p110alpha_active*Akt1_Akt_PKB_PKB_Akt_PKBalpha_Rac/(reaction_9_KM_AKT_PI3K + Akt1_Akt_PKB_PKB_Akt_PKBalpha_Rac);  // modifiers: Pik3ca_6330412C24Rik_caPI3K_p110_p110alpha_active
  AKT_deactivation: Akt1_Akt_PKB_PKB_Akt_PKBalpha_Rac_active => Akt1_Akt_PKB_PKB_Akt_PKBalpha_Rac; reaction_10_kd_AKT*Akt1_Akt_PKB_PKB_Akt_PKBalpha_Rac_active;
  ERK_deactivation_by_PP2A: Mapk1_9030612K14Rik_AA407128_AU018647_C78273_ERK_Erk2_MAPK2_PRKM2_Prkm1_p41mapk_p42mapk_active => Mapk1_9030612K14Rik_AA407128_AU018647_C78273_ERK_Erk2_MAPK2_PRKM2_Prkm1_p41mapk_p42mapk; reaction_11_k_ERKactive_PP2A*PP2A*Mapk1_9030612K14Rik_AA407128_AU018647_C78273_ERK_Erk2_MAPK2_PRKM2_Prkm1_p41mapk_p42mapk_active/(reaction_11_KM_ERKactive_PP2A + Mapk1_9030612K14Rik_AA407128_AU018647_C78273_ERK_Erk2_MAPK2_PRKM2_Prkm1_p41mapk_p42mapk_active);  // modifiers: PP2A
  PI3KCA_activation_by_kRas: Pik3ca_6330412C24Rik_caPI3K_p110_p110alpha => Pik3ca_6330412C24Rik_caPI3K_p110_p110alpha_active; reaction_12_k_PI3K_Ras*Hras_H_ras_Ha_ras_Harvey_ras_Hras_1_Hras1_Kras2_c_H_ras_c_Ha_ras_c_rasHa_ras_active*Pik3ca_6330412C24Rik_caPI3K_p110_p110alpha/(reaction_12_KM_PI3K_Ras + Pik3ca_6330412C24Rik_caPI3K_p110_p110alpha);  // modifiers: Hras_H_ras_Ha_ras_Harvey_ras_Hras_1_Hras1_Kras2_c_H_ras_c_Ha_ras_c_rasHa_ras_active
  Raf_activation_by_kRas: Raf1_6430402F14Rik_AA990557_BB129353_Craf1_D830050J10Rik_Raf_1_c_Raf_v_Raf => Raf1_6430402F14Rik_AA990557_BB129353_Craf1_D830050J10Rik_Raf_1_c_Raf_v_Raf_active; reaction_13_k_Raf_RasActive*Hras_H_ras_Ha_ras_Harvey_ras_Hras_1_Hras1_Kras2_c_H_ras_c_Ha_ras_c_rasHa_ras_active*Raf1_6430402F14Rik_AA990557_BB129353_Craf1_D830050J10Rik_Raf_1_c_Raf_v_Raf/(reaction_13_KM_Raf_RasActive + Raf1_6430402F14Rik_AA990557_BB129353_Craf1_D830050J10Rik_Raf_1_c_Raf_v_Raf);  // modifiers: Hras_H_ras_Ha_ras_Harvey_ras_Hras_1_Hras1_Kras2_c_H_ras_c_Ha_ras_c_rasHa_ras_active
  Mek_activation_by_Raf: Map2k1_MAPKK1_MEKK1_Mek1_Prkmk1 => Map2k1_MAPKK1_MEKK1_Mek1_Prkmk1_active; reaction_14_k_Mek_Raf_active*Raf1_6430402F14Rik_AA990557_BB129353_Craf1_D830050J10Rik_Raf_1_c_Raf_v_Raf_active*Map2k1_MAPKK1_MEKK1_Mek1_Prkmk1/(reaction_14_KM_Mek_Raf_active + Map2k1_MAPKK1_MEKK1_Mek1_Prkmk1);  // modifiers: Raf1_6430402F14Rik_AA990557_BB129353_Craf1_D830050J10Rik_Raf_1_c_Raf_v_Raf_active
  Raf_deactivation_by_AKT: Raf1_6430402F14Rik_AA990557_BB129353_Craf1_D830050J10Rik_Raf_1_c_Raf_v_Raf_active => Raf1_6430402F14Rik_AA990557_BB129353_Craf1_D830050J10Rik_Raf_1_c_Raf_v_Raf; reaction_15_k_Raf_AKT*Akt1_Akt_PKB_PKB_Akt_PKBalpha_Rac_active*Raf1_6430402F14Rik_AA990557_BB129353_Craf1_D830050J10Rik_Raf_1_c_Raf_v_Raf_active/(reaction_15_KM_Raf_AKT + Raf1_6430402F14Rik_AA990557_BB129353_Craf1_D830050J10Rik_Raf_1_c_Raf_v_Raf_active);  // modifiers: Akt1_Akt_PKB_PKB_Akt_PKBalpha_Rac_active
  Ras_deactivation_by_RasGab: Hras_H_ras_Ha_ras_Harvey_ras_Hras_1_Hras1_Kras2_c_H_ras_c_Ha_ras_c_rasHa_ras_active => Hras_H_ras_Ha_ras_Harvey_ras_Hras_1_Hras1_Kras2_c_H_ras_c_Ha_ras_c_rasHa_ras; reaction_16_k_RasActiveRasGap*Rasa2_5430433H21Rik_AA517451_AU023900_GAP1m_active*Hras_H_ras_Ha_ras_Harvey_ras_Hras_1_Hras1_Kras2_c_H_ras_c_Ha_ras_c_rasHa_ras_active/(reaction_16_KM_RasActiveRasGap + Hras_H_ras_Ha_ras_Harvey_ras_Hras_1_Hras1_Kras2_c_H_ras_c_Ha_ras_c_rasHa_ras_active);  // modifiers: Rasa2_5430433H21Rik_AA517451_AU023900_GAP1m_active
  Mek_deactivation_by_PP2A: Map2k1_MAPKK1_MEKK1_Mek1_Prkmk1_active => Map2k1_MAPKK1_MEKK1_Mek1_Prkmk1; reaction_17_k_MekActivePP2A*PP2A*Map2k1_MAPKK1_MEKK1_Mek1_Prkmk1_active/(reaction_17_KM_MekActivePP2A + Map2k1_MAPKK1_MEKK1_Mek1_Prkmk1_active);  // modifiers: PP2A
  IGFR_active_degradation: Csf1r_AI323359_CD115_CSF_1R_Csfmr_Fim_2_Fms_M_CSF_R_M_CSFR => ; reaction_18_gamma_IGFR*Csf1r_AI323359_CD115_CSF_1R_Csfmr_Fim_2_Fms_M_CSF_R_M_CSFR;
  PI3KCA_deactivation: Pik3ca_6330412C24Rik_caPI3K_p110_p110alpha_active => Pik3ca_6330412C24Rik_caPI3K_p110_p110alpha; reaction_19_kd_PI3K_a*Pik3ca_6330412C24Rik_caPI3K_p110_p110alpha_active;
  deactivation_by_RafPP: Raf1_6430402F14Rik_AA990557_BB129353_Craf1_D830050J10Rik_Raf_1_c_Raf_v_Raf_active => Raf1_6430402F14Rik_AA990557_BB129353_Craf1_D830050J10Rik_Raf_1_c_Raf_v_Raf; reaction_20_k_RasActive_RafPP*RafPP*Raf1_6430402F14Rik_AA990557_BB129353_Craf1_D830050J10Rik_Raf_1_c_Raf_v_Raf_active/(reaction_20_KM_RasActive_RafPP + Raf1_6430402F14Rik_AA990557_BB129353_Craf1_D830050J10Rik_Raf_1_c_Raf_v_Raf_active);  // modifiers: RafPP
  P90_activation_by_ERK: P90Rsk => P90Rsk_active; reaction_21_k_P90Rsk_ERKActive*Mapk1_9030612K14Rik_AA407128_AU018647_C78273_ERK_Erk2_MAPK2_PRKM2_Prkm1_p41mapk_p42mapk_active*P90Rsk/(reaction_21_KM_P90Rsk_ERKActive + P90Rsk);  // modifiers: Mapk1_9030612K14Rik_AA407128_AU018647_C78273_ERK_Erk2_MAPK2_PRKM2_Prkm1_p41mapk_p42mapk_active
  P90_deactivation: P90Rsk_active => P90Rsk; reaction_22_kd_P90Rsk*P90Rsk_active;

  // Unit definitions:
  unit per_second = 1 / second;
end
