// SBML level 3 version 1

model Ras_MAPK_v2()
  // model units - substance: mole_per_cubic_micrometer, time: time, extent: mole_per_cubic_micrometer

  // Compartments:
  compartment cell = 1;

  // Species:
  species SOS in cell = 200/cell;
  species Ras_GDP in cell = 950/cell; Ras_GDP is "Ras-GDP";
  species Ras_GDP_SOS in cell = 0; Ras_GDP_SOS is "Ras-GDP-SOS";
  species Ras_GTP in cell = 50/cell; Ras_GTP is "Ras-GTP";
  species Ras_GTP_SOS in cell = 0; Ras_GTP_SOS is "Ras-GTP-SOS";
  species GAP in cell = 11/cell;
  species RasGRF in cell = 5/cell;
  species RasGRP in cell = 2/cell;
  species Raf in cell = 1.8/cell;
  species Raf_P in cell = 0; Raf_P is "Raf-P";
  species RafP_prim_ase in cell = 0.18/cell; RafP_prim_ase is "RafP'ase";
  species MEK in cell = 720/cell;
  species MEK_P in cell = 0; MEK_P is "MEK-P";
  species MEKP_prim_ase in cell = 0.18/cell; MEKP_prim_ase is "MEKP'ase";
  species MEK_PP in cell = 0; MEK_PP is "MEK-PP";
  species ERK in cell = 720/cell;
  species ERK_P in cell = 0; ERK_P is "ERK-P";
  species ERKP_prim_ase in cell = 72/cell; ERKP_prim_ase is "ERKP'ase";
  species ERK_PP in cell = 0; ERK_PP is "ERK-PP";
  species SOS_P in cell = 0; SOS_P is "SOS-P";
  species Ras_GTP_SOS_P in cell = 0; Ras_GTP_SOS_P is "Ras-GTP-SOS-P";
  species Ras_GDP_SOS_P in cell = 0; Ras_GDP_SOS_P is "Ras-GDP-SOS-P";
  species GAP_Ras_GTP in cell = 0; GAP_Ras_GTP is "GAP-Ras-GTP";
  species RasGRF_Ras_GDP in cell = 0; RasGRF_Ras_GDP is "RasGRF-Ras-GDP";
  species RasGRP_Ras_GDP in cell = 0; RasGRP_Ras_GDP is "RasGRP-Ras-GDP";
  species Ras_GDP_SOS_Ras_GDP in cell = 0; Ras_GDP_SOS_Ras_GDP is "Ras-GDP-SOS-Ras-GDP";
  species Ras_GTP_SOS_Ras_GDP in cell = 0; Ras_GTP_SOS_Ras_GDP is "Ras-GTP-SOS-Ras-GDP";
  species Ras_GTP_Raf in cell = 0; Ras_GTP_Raf is "Ras-GTP-Raf";
  species RafP_prim_ase_Raf_P in cell = 0; RafP_prim_ase_Raf_P is "RafP'ase-Raf-P";
  species Raf_P_MEK in cell = 0; Raf_P_MEK is "Raf-P-MEK";
  species MEKP_prim_ase_MEK_P in cell = 0; MEKP_prim_ase_MEK_P is "MEKP'ase-MEK-P";
  species Raf_P_MEK_P in cell = 0; Raf_P_MEK_P is "Raf-P-MEK-P";
  species MEKP_prim_ase_MEK_PP in cell = 0; MEKP_prim_ase_MEK_PP is "MEKP'ase-MEK-PP";
  species MEK_PP_ERK in cell = 0; MEK_PP_ERK is "MEK-PP-ERK";
  species ERKP_prim_ase_ERK_P in cell = 0; ERKP_prim_ase_ERK_P is "ERKP'ase-ERK-P";
  species MEK_PP_ERK_P in cell = 0; MEK_PP_ERK_P is "MEK-PP-ERK-P";
  species ERKP_prim_ase_ERK_PP in cell = 0; ERKP_prim_ase_ERK_PP is "ERKP'ase-ERK-PP";
  species ERK_PP_SOS in cell = 0; ERK_PP_SOS is "ERK-PP-SOS";
  species ERK_PP_Ras_GTP_SOS in cell = 0; ERK_PP_Ras_GTP_SOS is "ERK-PP-Ras-GTP-SOS";
  species ERK_PP_Ras_GDP_SOS in cell = 0; ERK_PP_Ras_GDP_SOS is "ERK-PP-Ras-GDP-SOS";

  // Parameters:
  d1 = 3 moles_per_second;
  k1 = 0.00018 moles_per_second;
  d2 = 0.4 moles_per_second;
  k2 = 0.00017 moles_per_second;
  kcat3 = 1.6 moles_per_second;
  k3m = 1640 moles_per_second;
  kcat4 = 0.003 moles_per_second;
  k4m = 9120 moles_per_second;
  kcat5 = 0.1 moles_per_second;
  k5m = 107 moles_per_second;
  kcat6 = 0.01 moles_per_second;
  k6m = 0.0051 moles_per_second;
  kcat23 = 0.01 moles_per_second;
  k23m = 0.0051 moles_per_second;
  kcat7 = 0.5 moles_per_second;
  k7m = 10000 moles_per_second;
  kcat8 = 150 moles_per_second;
  k8m = 180 moles_per_second;
  kcat9 = 150 moles_per_second;
  k9m = 180 moles_per_second;
  kcat10 = 150 moles_per_second;
  k10m = 180 moles_per_second;
  kcat11 = 150 moles_per_second;
  k11m = 180 moles_per_second;
  kcat12 = 150 moles_per_second;
  k12m = 180 moles_per_second;
  kcat13 = 150 moles_per_second;
  k13m = 180 moles_per_second;
  kcat14 = 150 moles_per_second;
  k14m = 180 moles_per_second;
  kcat15 = 150 moles_per_second;
  k15m = 180 moles_per_second;
  kcat16 = 150 moles_per_second;
  k16m = 180 moles_per_second;
  kcat17 = 150 moles_per_second;
  k17m = 180 moles_per_second;
  kcat18 = 150 moles_per_second;
  k18m = 180 moles_per_second;
  kcat19 = 150 moles_per_second;
  k19m = 180 moles_per_second;
  k20 = 140 moles_per_second;
  k21 = 140 moles_per_second;
  k22 = 140 moles_per_second;
  d1 = 0 moles_per_second;
  d2 = 0 moles_per_second;
  k3 = 0 moles_per_second;
  d3 = 0 moles_per_second;
  k4 = 0 moles_per_second;
  d4 = 0 moles_per_second;
  k5 = 0 moles_per_second;
  d5 = 0 moles_per_second;
  k6 = 0 moles_per_second;
  d6 = 0 moles_per_second;
  k23 = 0 moles_per_second;
  d23 = 0 moles_per_second;
  k7 = 0 moles_per_second;
  d7 = 0 moles_per_second;
  k8 = 0 moles_per_second;
  d8 = 0 moles_per_second;
  k9 = 0 moles_per_second;
  d9 = 0 moles_per_second;
  k10 = 0 moles_per_second;
  d10 = 0 moles_per_second;
  k11 = 0 moles_per_second;
  d11 = 0 moles_per_second;
  k12 = 0 moles_per_second;
  d12 = 0 moles_per_second;
  k13 = 0 moles_per_second;
  d13 = 0 moles_per_second;
  k14 = 0 moles_per_second;
  d14 = 0 moles_per_second;
  k15 = 0 moles_per_second;
  d15 = 0 moles_per_second;
  k16 = 0 moles_per_second;
  d16 = 0 moles_per_second;
  k17 = 0 moles_per_second;
  d17 = 0 moles_per_second;
  k18 = 0 moles_per_second;
  d18 = 0 moles_per_second;
  k19 = 0 moles_per_second;
  d19 = 0 moles_per_second;

  // Reactions:
  reaction_0: SOS + Ras_GDP -> Ras_GDP_SOS; k1*SOS*Ras_GDP - d1*Ras_GDP_SOS;
  reaction_1: SOS + Ras_GTP -> Ras_GTP_SOS; k2*SOS*Ras_GTP - d2*Ras_GTP_SOS;
  reaction_2: Ras_GDP => Ras_GTP; kcat3*Ras_GTP_SOS*Ras_GDP/(k3m + Ras_GDP);  // modifiers: Ras_GTP_SOS
  reaction_3: Ras_GDP => Ras_GTP; kcat4*Ras_GDP_SOS*Ras_GDP/(k4m + Ras_GDP);  // modifiers: Ras_GDP_SOS
  reaction_4: Ras_GTP => Ras_GDP; kcat5*GAP*Ras_GTP/(k5m + Ras_GTP);  // modifiers: GAP
  reaction_5: Ras_GDP => Ras_GTP; kcat6*RasGRF*Ras_GDP/(k6m + Ras_GDP);  // modifiers: RasGRF
  reaction_6: Ras_GDP => Ras_GTP; kcat23*RasGRP*Ras_GDP/(k23m + Ras_GDP);  // modifiers: RasGRP
  reaction_7: Raf => Raf_P; kcat7*Ras_GTP*Raf/(k7m + Raf);  // modifiers: Ras_GTP
  reaction_8: Raf_P => Raf; kcat8*RafP_prim_ase*Raf_P/(k8m + Raf_P);  // modifiers: RafP_prim_ase
  reaction_9: MEK => MEK_P; kcat9*Raf_P*MEK/(k9m + MEK);  // modifiers: Raf_P
  reaction_10: MEK_P => MEK; kcat10*MEKP_prim_ase*MEK_P/(k10m + MEK_P);  // modifiers: MEKP_prim_ase
  reaction_11: MEK_P => MEK_PP; kcat11*Raf_P*MEK_P/(k11m + MEK_P);  // modifiers: Raf_P
  reaction_12: MEK_PP => MEK_P; kcat12*MEKP_prim_ase*MEK_PP/(k12m + MEK_PP);  // modifiers: MEKP_prim_ase
  reaction_13: ERK => ERK_P; kcat13*MEK_PP*ERK/(k13m + ERK);  // modifiers: MEK_PP
  reaction_14: ERK_P => ERK; kcat14*ERKP_prim_ase*ERK_P/(k14m + ERK_P);  // modifiers: ERKP_prim_ase
  reaction_15: ERK_P => ERK_PP; kcat15*MEK_PP*ERK_P/(k15m + ERK_P);  // modifiers: MEK_PP
  reaction_16: ERK_PP => ERK_P; kcat16*ERKP_prim_ase*ERK_PP/(k16m + ERK_PP);  // modifiers: ERKP_prim_ase
  reaction_17: SOS => SOS_P; kcat17*ERK_PP*SOS/(k17m + SOS);  // modifiers: ERK_PP
  reaction_18: Ras_GTP_SOS => Ras_GTP_SOS_P; kcat18*ERK_PP*Ras_GTP_SOS/(k18m + Ras_GTP_SOS);  // modifiers: ERK_PP
  reaction_19: Ras_GDP_SOS => Ras_GDP_SOS_P; kcat19*ERK_PP*Ras_GDP_SOS/(k19m + Ras_GDP_SOS);  // modifiers: ERK_PP
  reaction_20: SOS_P => SOS; k20*SOS_P;
  reaction_21: Ras_GTP_SOS_P => Ras_GTP_SOS; k21*Ras_GTP_SOS_P;
  reaction_22: Ras_GDP_SOS_P => Ras_GDP_SOS; k22*Ras_GDP_SOS_P;

  // Unit definitions:
  unit mole per cubic micrometer = 10 mole / (1e-6 )^3;
  unit time = 10 second;
end
