// SBML level 3 version 1

model model_0()
  // Bioconi2012
  // model units - substance: mole_per_cubic_micrometer, time: time, extent: mole_per_cubic_micrometer

  // Compartments:
  compartment cytosol = 1;

  // Species:
  species Hras_H_ras_Ha_ras_Harvey_ras_Hras_1_Hras1_Kras2_c_H_ras_c_Ha_ras_c_rasHa_ras_active in cytosol = 0; Hras_H_ras_Ha_ras_Harvey_ras_Hras_1_Hras1_Kras2_c_H_ras_c_Ha_ras_c_rasHa_ras_active is "Hras_H-ras_Ha-ras_Harvey-ras_Hras-1_Hras1_Kras2_c-H-ras_c-Ha-ras_c-rasHa_ras_active";
  species Hras_H_ras_Ha_ras_Harvey_ras_Hras_1_Hras1_Kras2_c_H_ras_c_Ha_ras_c_rasHa_ras in cytosol = 233300/cytosol; Hras_H_ras_Ha_ras_Harvey_ras_Hras_1_Hras1_Kras2_c_H_ras_c_Ha_ras_c_rasHa_ras is "Hras_H-ras_Ha-ras_Harvey-ras_Hras-1_Hras1_Kras2_c-H-ras_c-Ha-ras_c-rasHa_ras";
  species Pik3ca_6330412C24Rik_caPI3K_p110_p110alpha in cytosol = 112000/cytosol;
  species species_2_ES in cytosol = 0; species_2_ES is "Grb2_AA408164_Ash_and_Sos1_4430401P03Rik_9630010N06_AI449023";
  species Sos1_4430401P03Rik_9630010N06_AI449023 in cytosol = 134600/cytosol;
  species Grb2_AA408164_Ash in cytosol = 3.2823/cytosol;
  species Raf1_6430402F14Rik_AA990557_BB129353_Craf1_D830050J10Rik_Raf_1_c_Raf_v_Raf in cytosol = 111400/cytosol; Raf1_6430402F14Rik_AA990557_BB129353_Craf1_D830050J10Rik_Raf_1_c_Raf_v_Raf is "Raf1_6430402F14Rik_AA990557_BB129353_Craf1_D830050J10Rik_Raf-1_c-Raf_v-Raf";
  species Sos1_4430401P03Rik_9630010N06_AI449023_active in cytosol = 0;

  // Parameters:
  reaction_1_PPrel_km_1 = 6322000 moles_per_second;
  reaction_1_PPrel_kcat_1 = 3.8202e-5 moles_per_second;
  reaction_2_PPrel_k_1_2 = 99.287 moles_per_second;
  reaction_2_PPrel_k1_2 = 2.1539e-5 moles_per_second;
  reaction_3_PPrel_km_3 = 0.037208 moles_per_second;
  reaction_3_PPrel_kcat_3 = 0.00013261 moles_per_second;
  reaction_4_PPrel_km_4 = 9.9393e-7 moles_per_second;
  reaction_4_PPrel_kcat_4 = 0.00016413 moles_per_second;

  // Reactions:
  reaction_1_PPrel: Pik3ca_6330412C24Rik_caPI3K_p110_p110alpha => Hras_H_ras_Ha_ras_Harvey_ras_Hras_1_Hras1_Kras2_c_H_ras_c_Ha_ras_c_rasHa_ras_active; reaction_1_PPrel_kcat_1*Pik3ca_6330412C24Rik_caPI3K_p110_p110alpha*Hras_H_ras_Ha_ras_Harvey_ras_Hras_1_Hras1_Kras2_c_H_ras_c_Ha_ras_c_rasHa_ras/(reaction_1_PPrel_km_1 + Hras_H_ras_Ha_ras_Harvey_ras_Hras_1_Hras1_Kras2_c_H_ras_c_Ha_ras_c_rasHa_ras); reaction_1_PPrel is "activation";  // modifiers: Hras_H_ras_Ha_ras_Harvey_ras_Hras_1_Hras1_Kras2_c_H_ras_c_Ha_ras_c_rasHa_ras
  reaction_2_PPrel: Grb2_AA408164_Ash + Sos1_4430401P03Rik_9630010N06_AI449023 -> species_2_ES; reaction_2_PPrel_k1_2*Grb2_AA408164_Ash*Sos1_4430401P03Rik_9630010N06_AI449023 - reaction_2_PPrel_k_1_2*species_2_ES; reaction_2_PPrel is "binding";
  reaction_3_PPrel: Raf1_6430402F14Rik_AA990557_BB129353_Craf1_D830050J10Rik_Raf_1_c_Raf_v_Raf => Hras_H_ras_Ha_ras_Harvey_ras_Hras_1_Hras1_Kras2_c_H_ras_c_Ha_ras_c_rasHa_ras_active; reaction_3_PPrel_kcat_3*Raf1_6430402F14Rik_AA990557_BB129353_Craf1_D830050J10Rik_Raf_1_c_Raf_v_Raf*Hras_H_ras_Ha_ras_Harvey_ras_Hras_1_Hras1_Kras2_c_H_ras_c_Ha_ras_c_rasHa_ras/(reaction_3_PPrel_km_3 + Hras_H_ras_Ha_ras_Harvey_ras_Hras_1_Hras1_Kras2_c_H_ras_c_Ha_ras_c_rasHa_ras); reaction_3_PPrel is "activation";  // modifiers: Hras_H_ras_Ha_ras_Harvey_ras_Hras_1_Hras1_Kras2_c_H_ras_c_Ha_ras_c_rasHa_ras
  reaction_4_PPrel: Hras_H_ras_Ha_ras_Harvey_ras_Hras_1_Hras1_Kras2_c_H_ras_c_Ha_ras_c_rasHa_ras => Sos1_4430401P03Rik_9630010N06_AI449023_active; reaction_4_PPrel_kcat_4*Hras_H_ras_Ha_ras_Harvey_ras_Hras_1_Hras1_Kras2_c_H_ras_c_Ha_ras_c_rasHa_ras*Sos1_4430401P03Rik_9630010N06_AI449023/(reaction_4_PPrel_km_4 + Sos1_4430401P03Rik_9630010N06_AI449023); reaction_4_PPrel is "activation";  // modifiers: Sos1_4430401P03Rik_9630010N06_AI449023

  // Unit definitions:
  unit per_second = 1 / second;
  unit time = 10 second;
  unit mole_per_cubic_micrometer = 10 mole / (1e-6 )^3;
end
