// SBML level 3 version 1

model model_0()
  // Reduced Ras
  // model units - substance: nmol, time: s, extent: nmol

  // Compartments:
  compartment cell = 1 L;

  // Species:
  species sos in cell = total_sos; sos is "SOS";
  species ras_gdp in cell; ras_gdp is "Ras-GDP";
  species ras_gtp in cell = 12; ras_gtp is "Ras-GTP";
  species sos_ras_gdp in cell; sos_ras_gdp is "SOS-Ras-GDP";
  species sos_ras_gtp in cell = 0; sos_ras_gtp is "SOS-Ras-GTP";
  species gap in cell = 100; gap is "GAP";
  species gef in cell = 100; gef is "GEF";
  species sos_i in cell = 200; sos_i is "SOS inactive form";
  species $total_ras in cell = 1000; total_ras is "Total Ras";
  species $total_sos in cell = 200; total_sos is "Total SOS";

  // Parameters:
  k1 = 0.00018 per_nmol_per_liter_per_seconds; k1 is "SOS-Ras-GDP complexification constant";
  d1 = 3 s_1; d1 is "SOS-Ras-GDP decomplexification constant";
  k4cat = 0.003 s_1; k4cat is "Ras activation by SOS-Ras-GDP catalytic constant";
  k4m = 9120 nmol_per_liter; k4m is "Ras activation by SOS-Ras-GDP michaelis constant";
  kcat3 = 2 s_1; kcat3 is "Ras activation by SOS-Ras-GTP catalytic constant";
  k3m = 1640 nmol_per_liter; k3m is "Ras activation by SOS-Ras-GTP michaelis constant";
  k5cat = 0.1 s_1; k5cat is "Ras inactivation by GAP catalytic constant";
  k5m = 107 nmol_per_liter; k5m is "Ras inactivation by GAP michaelis constant";
  k2 = 0.00017 per_nmol_per_liter_per_seconds; k2 is "SOS-Ras-GTP complexification constant";
  d2 = 0.4 s_1; d2 is "SOS-Ras-GTP decomplexification constant";
  k6cat = 0.01 s_1; k6cat is "Ras activation by GEF catalytic constant";
  k6m = 0.0051 nmol_per_liter; k6m is "Ras activation by GEF michaelis constant";
  k7 = 1; k7 is "SOS activation constant";
  d7 = 1; d7 is "SOS inactivation constant";

  // Assignment rules:
  sos_ras_gdp := total_sos + (-sos) + (-sos_ras_gtp);
  ras_gdp := total_ras + (-ras_gtp) + (-sos_ras_gdp) + (-sos_ras_gtp);

  // Rate rules:
  sos' = sos_ras_gdp*d1 + sos_ras_gtp*d2 + (-1*ras_gdp*sos*k1) + (-1*ras_gtp*sos*k2);
  sos_ras_gtp' = -1*sos_ras_gtp*d2 + ras_gtp*sos*k2;
  ras_gtp' = sos_ras_gtp*d2 + (-1*ras_gtp*sos*k2) + ras_gdp*sos_ras_gdp*k4cat/(ras_gdp + k4m) + ras_gdp*sos_ras_gtp*kcat3/(ras_gdp + k3m) + (-1*gap*ras_gtp*k5cat/(ras_gtp + k5m));

  // Unit definitions:
  unit L = 10 litre; L is "Litre";
  unit nmol = 1e-9 mole; nmol is "Nanomoles";
  unit nmol_per_liter = 1e-9 mole / (10 litre); nmol_per_liter is "Nanomoles per litre";
  unit s = 10 second; s is "Seconds";
  unit s_1 = 1 / (10 second); s_1 is "per Seconds";
  unit nmol_1 = 1 / (1e-9 mole); nmol_1 is "per Nanomoles";
  unit dim_less = 10 dimensionless; dim_less is "Dimensionless";
  unit per_nmol_per_seconds = 1 / (1e-9 mole * 10 second); per_nmol_per_seconds is "per Nanomoles per Seconds";
  unit mnol_per_seconds = 1e-9 mole / (10 second); mnol_per_seconds is "Nanomoles per seconds";
  unit nmol_per_liter_per_seconds = 1e-9 mole / (10 litre * 10 second); nmol_per_liter_per_seconds is "Nanomoles per litre per seconds";
  unit per_nmol_per_liter_per_seconds = 10 litre / (1e-9 mole * 10 second); per_nmol_per_liter_per_seconds is "per Nanomoles per liter per Seconds";
end
